// SBML level 3 version 2

model one_protein()
  // model units - substance: mole, time: second, extent: mole

  // Compartments:
  compartment default_compartment = 1 litre;

  // Species:
  species p_A__nu in default_compartment;
  species p_A__mu in default_compartment;
  species p_A__r in default_compartment;
  species p_A__m_h in default_compartment;
  species p_A__J_host_sum in default_compartment;
  species p_A__K_C0 in default_compartment;
  species p_A__E_m in default_compartment;
  species p_A__J in default_compartment;
  species p_A__m in default_compartment = 100;

  // Parameters:
  p_A__N = 1 per_second;
  p_A__omega = 10 per_second;
  p_A__d_m = 0.16 per_second;
  p_A__k_b = 4.7627 per_second;
  p_A__k_u = 119.7956 per_second;
  p_A__l_p = 195 per_second;
  p_A__l_e = 25 per_second;

  // Assignment rules:
  p_A__K_C0 := p_A__k_b/(p_A__k_u + p_A__nu/p_A__l_e);
  p_A__E_m := 0.62*p_A__l_p/p_A__l_e;
  p_A__J := p_A__E_m*p_A__omega/(p_A__d_m/p_A__K_C0 + p_A__mu*p_A__r);
  p_A__nu := 1;
  p_A__mu := 1;
  p_A__r := 1;
  p_A__m_h := 1;
  p_A__J_host_sum := 1;

  // Rate rules:
  p_A__m' = (p_A__m_h*p_A__N*p_A__J/p_A__J_host_sum - p_A__m)*p_A__mu;

  // Unit definitions:
  unit per_second = 1 / second;
end
